// SBML level 3 version 1

model pIKE_Right_Inverter_1(Cell, GFP, LacI, TetR)

  // Compartments:
  compartment Cell = 1;

  // Species:
  substanceOnly species LacI in Cell = 0;
  substanceOnly species pLac in Cell = 2;
  substanceOnly species TetR in Cell = 0;
  substanceOnly species GFP in Cell = 0;

  // Parameters:
  kr_f = 0.5; kr_f is "Forward repression binding rate";
  kr_r = 1; kr_r is "Reverse repression binding rate";
  ka_f = 0.0033; ka_f is "Forward activation binding rate";
  ka_r = 1; ka_r is "Reverse activation binding rate";
  ko_f = 0.033; ko_f is "Forward RNAP binding rate";
  ko_r = 1; ko_r is "Reverse RNAP binding rate";
  kao_f = 1; kao_f is "Forward activated RNAP binding rate";
  kao_r = 1; kao_r is "Reverse activated RNAP binding rate";
  nc = 2; nc is "Stoichiometry of binding";
  nr = 30; nr is "Initial RNAP count";
  ko = 0.05; ko is "Open complex production rate";
  kb = 0.0001; kb is "Basal production rate";
  ng = 2; ng is "Initial promoter count";
  np = 10; np is "Stoichiometry of production";
  ka = 0.25; ka is "Activated production rate";

  // Reactions:
  Production_pLac: => 10 TetR + 10 GFP; pLac*ko*(ko_f/ko_r)*nr/(1 + ko_f/ko_r*nr + (kr_f/kr_r*LacI)^nc);  // modifiers: pLac, LacI
end

model pIKE_Left_Inverter_4(Cell, LacI, TetR)

  // Compartments:
  compartment Cell = 1;

  // Species:
  substanceOnly species TetR in Cell = 0;
  substanceOnly species LacI in Cell = 0;
  substanceOnly species pTet in Cell = 2;

  // Parameters:
  kr_f = 0.5; kr_f is "Forward repression binding rate";
  kr_r = 1; kr_r is "Reverse repression binding rate";
  ka_f = 0.0033; ka_f is "Forward activation binding rate";
  ka_r = 1; ka_r is "Reverse activation binding rate";
  ko_f = 0.033; ko_f is "Forward RNAP binding rate";
  ko_r = 1; ko_r is "Reverse RNAP binding rate";
  kao_f = 1; kao_f is "Forward activated RNAP binding rate";
  kao_r = 1; kao_r is "Reverse activated RNAP binding rate";
  nc = 2; nc is "Stoichiometry of binding";
  nr = 30; nr is "Initial RNAP count";
  ko = 0.05; ko is "Open complex production rate";
  kb = 0.0001; kb is "Basal production rate";
  ng = 2; ng is "Initial promoter count";
  np = 10; np is "Stoichiometry of production";
  ka = 0.25; ka is "Activated production rate";

  // Reactions:
  Production_pTet: => 10 LacI; pTet*ko*(ko_f/ko_r)*nr/(1 + ko_f/ko_r*nr + (kr_f/kr_r*TetR)^nc);  // modifiers: pTet, TetR
end

model pIKE_Toggle_13(Cell)

  // Sub-modules:
  C2: pIKE_Right_Inverter_1();
  C1: pIKE_Left_Inverter_4();

  // Compartments:
  compartment Cell = 1; C2.Cell is Cell; C1.Cell is Cell;

  // Species:
  substanceOnly species LacI in Cell = 0; C2.LacI is LacI; C1.LacI is LacI;
  substanceOnly species TetR in Cell = 0; C1.TetR is TetR; C2.TetR is TetR;
  substanceOnly species GFP in Cell = 0; C2.GFP is GFP;
end
