// SBML level 3 version 1

model pTAK_Right_Inverter_2(Cell, GFP, LacI, cI)

  // Compartments:
  compartment Cell = 1;

  // Species:
  substanceOnly species LacI in Cell = 0;
  substanceOnly species pLac in Cell = 2;
  substanceOnly species cI in Cell = 0;
  substanceOnly species GFP in Cell = 0;

  // Parameters:
  kr_f = 0.5; kr_f is "Forward repression binding rate";
  kr_r = 1; kr_r is "Reverse repression binding rate";
  ka_f = 0.0033; ka_f is "Forward activation binding rate";
  ka_r = 1; ka_r is "Reverse activation binding rate";
  ko_f = 0.033; ko_f is "Forward RNAP binding rate";
  ko_r = 1; ko_r is "Reverse RNAP binding rate";
  kao_f = 1; kao_f is "Forward activated RNAP binding rate";
  kao_r = 1; kao_r is "Reverse activated RNAP binding rate";
  nc = 2; nc is "Stoichiometry of binding";
  nr = 30; nr is "Initial RNAP count";
  ko = 0.05; ko is "Open complex production rate";
  kb = 0.0001; kb is "Basal production rate";
  ng = 2; ng is "Initial promoter count";
  np = 10; np is "Stoichiometry of production";
  ka = 0.25; ka is "Activated production rate";

  // Reactions:
  Production_pLac: => 10 cI + 10 GFP; pLac*ko*(ko_f/ko_r)*nr/(1 + ko_f/ko_r*nr + (kr_f/kr_r*LacI)^nc);  // modifiers: pLac, LacI
end

model pTAK_Left_Inverter_3(Cell, LacI, cI)

  // Compartments:
  compartment Cell = 1;

  // Species:
  substanceOnly species cI in Cell = 0;
  substanceOnly species LacI in Cell = 0;
  substanceOnly species PL in Cell = 2;

  // Parameters:
  kr_f = 0.5; kr_f is "Forward repression binding rate";
  kr_r = 1; kr_r is "Reverse repression binding rate";
  ka_f = 0.0033; ka_f is "Forward activation binding rate";
  ka_r = 1; ka_r is "Reverse activation binding rate";
  ko_f = 0.033; ko_f is "Forward RNAP binding rate";
  ko_r = 1; ko_r is "Reverse RNAP binding rate";
  kao_f = 1; kao_f is "Forward activated RNAP binding rate";
  kao_r = 1; kao_r is "Reverse activated RNAP binding rate";
  nc = 2; nc is "Stoichiometry of binding";
  nr = 30; nr is "Initial RNAP count";
  ko = 0.05; ko is "Open complex production rate";
  kb = 0.0001; kb is "Basal production rate";
  ng = 2; ng is "Initial promoter count";
  np = 10; np is "Stoichiometry of production";
  ka = 0.25; ka is "Activated production rate";

  // Reactions:
  Production_PL: => 10 LacI; PL*ko*(ko_f/ko_r)*nr/(1 + ko_f/ko_r*nr + (kr_f/kr_r*cI)^nc);  // modifiers: PL, cI
end

model pTAK_Toggle_10(Cell)

  // Sub-modules:
  C2: pTAK_Right_Inverter_2();
  C1: pTAK_Left_Inverter_3();

  // Compartments:
  compartment Cell = 1; C2.Cell is Cell; C1.Cell is Cell;

  // Species:
  substanceOnly species LacI in Cell = 0; C2.LacI is LacI; C1.LacI is LacI;
  substanceOnly species cI in Cell = 0; C1.cI is cI; C2.cI is cI;
  substanceOnly species GFP in Cell = 0; C2.GFP is GFP;
end
